// SBML level 2 version 4

function Free_Macrophages(Mf, Fa1, M, T, PTf, Fd, FB6, s, B1, FB4)
  Mf*Fa1 - M*(T/PTf)*Fd*(1 + Mf*FB6*s) - M*B1 - M*T*FB4;
end

function Macrophages_that_have_Phagocytosed(M, PTf, T, Fd, Mf, FB6, s, FB2, FB5, FB3)
  M*(T/PTf)*Fd*(1 + Mf*FB6*s) - Mf*T*FB5 - Mf*(FB2 + FB3 + FB6);
end

function Free_Tuberculosis(a2, T, k, Mf, FB6, PTf, M, Fd, s)
  a2*T*(1 - T/k) + Mf*FB6*PTf - M*(T/PTf)*Fd*(1 + Mf*FB6*s);
end

function Phagocytosed_Tuberculosis(a3, Tf, ka, Mf, M, PTf, T, Fd, FB6, s, Fg)
  a3*Tf*(1 - Tf/(1 + ka*Mf)) + M*(1/PTf)*T*Fd*(1 + Mf*FB6*s) - Mf*Tf*Fg;
end

model ModeloTBActualizado()

  // Compartments:
  compartment default = 1 volume;

  // Species:
  species M in default = 0;
  species Mf in default = 0;
  substanceOnly species T in default = 0;
  species Tf in default = 0;
  substanceOnly species $s5 in default = 0;
  substanceOnly species $s6 in default = 0;
  substanceOnly species $s7 in default = 0;
  substanceOnly species $s8 in default = 0;
  substanceOnly species $s10 in default = 0;
  substanceOnly species $s11 in default = 0;

  // Reactions:
  F: M => Mf; M*(T/F_PTf)*F_Fd*(1 + Mf*F_FB6*F_s); F is "Fagocitosis";  // modifiers: T
    F_PTf = 7 substance; F_Fd = 3.14e-10 substance; F_FB6 = 3.8989e-5 substance; F_s = 5.6957 substance;
  RM: $s5 => M; Mf*Fa1;  // modifiers: Mf
    Fa1 = 1080728 substance; RM_PTf = 7 substance; RM_Fd = 3.14e-10 substance; RM_FB6 = 3.8989e-5 substance; RM_s = 5.6957 substance;
  MM: M => $s6; M*B1 + M*T*FB4;  // modifiers: T
    B1 = 0.0019 substance; FB4 = 6.7929e-11 substance;
  MMf: Mf => $s8; Mf*T*FB5 + Mf*(FB2 + FB3 + MMf_FB6);  // modifiers: T
    FB2 = 50.8239 substance; FB3 = 816.8206 substance; MMf_FB6 = 3.8989e-5 substance; FB5 = 0.01 substance;
  MTf: Tf => $s7; Mf*Tf*Fg;  // modifiers: Mf
    Fg = 255.0102 substance;
  Pt: $s10 => T; a2*T*(1 - T/k) + Mf*Pt_FB6*Pt_PTf;  // modifiers: Mf
    a2 = 0.3423 substance; k = 24000000 substance; Pt_FB6 = 3.8989e-5 substance; Pt_PTf = 7 substance;
  PTf: $s11 => Tf; a3*Tf*(1 - Tf/(1 + ka*Mf));  // modifiers: Mf
    a3 = 0.3423 substance; ka = 24000000 substance;
  Ft: T => Tf; M*(T/Ft_PTf)*Ft_Fd*(1 + Mf*Ft_FB6*Ft_s);  // modifiers: M, Mf
    Ft_PTf = 7 substance; Ft_Fd = 3.14e-10 substance; Ft_FB6 = 3.8989e-5 substance; Ft_s = 5.6957 substance;

  // Unit definitions:
  unit substance = mole;
  unit volume = litre;
  unit area = metre^2;
  unit length = metre;
  unit time = second;
end
